Y(K, L) := L
alpha := 1
beta := -3
Ham(K, L, P) := -(K + L^2) + P*(alpha*L - beta*K)
dHam(K, L, P) := d/dL(Ham(K, L, P)) → P - 2*L
Lmax(K, P) := P/2
dK(K, P) := alpha*Lmax(K, P) - beta*K → 3*K + P/2
dP(K, P) := d/dK(Ham(K, L, P)*(-1)) → 1 - 3*P
t1 := 0
t2 := 2
v := [1]
y[0] := 2
load(t1, v) := [y[0]; v[0]]
scope(t2, y) := y[1] - 2
Fmax(t, y) := [dK(y[0], y[1]); dP(y[0], y[1])]
a := sbval(v, t1, t2, Fmax, load, scope) = [672.715]
y[1] := a[0]
res := rkfixed(y, t1, t2, 100, Fmax)
i := 0 .. rows(res) - 1
# численное решение
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k1 := exp(6)*5/3 = 672.381
k2 := 1/3
time := 0, 0.2 .. 2
# аналитическое решение
Popt(t) := k1*exp(-3*t) + k2
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Lopt(t) := Popt(t)/2
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c := k2/2
k := k1/2
Kopt(t) := (k1/12 + (-k1*exp(-6*t)/12) + 2 - exp(-3*t)/18 + 1/18)*exp(3*t)
Kopt(0) = 2
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left(t) := d/dt(Kopt(t))
right(t) := Lopt(t) + 3*Kopt(t)
left(time) = [342.357; 409.779; 629.2; 1082.01; 1936.17; 3508.51; 6382.27; 11623.4; 21176; 38583.5; 70302.7]
right(time) = [342.357; 409.779; 629.2; 1082.01; 1936.17; 3508.51; 6382.27; 11623.4; 21176; 38583.5; 70302.7]
I(K, L) := integral(K(t) + L(t)^2, t = 0 .. 2) - 2*K(2)
I(Kopt, Lopt) = -20220
